// SBML level 2 version 4

function Rate_Law_1_substrate_1_modifier(k, s, m)
  k*s*m;
end

function Rate_Law_1_substrate(s, k)
  s*k;
end

model Replication()

  // Compartments:
  compartment default = 1;

  // Species:
  species dsDNA in default = 580076; dsDNA is "dsDNA bp";
  species MG_094_HEXAMER in default = 50; MG_094_HEXAMER is "Helicase";
  species leadSsDNA in default = 0; leadSsDNA is "leading ssDNA base";
  species lagSsDNA in default = 0; lagSsDNA is "lagging ssDNA base";
  species MG_254_MONOMER in default = 50; MG_254_MONOMER is "ligase";
  species DNA_POLYMERASE_CORE in default = 50; DNA_POLYMERASE_CORE is "core subunit";
  species MG_001_DIMER in default = 50; MG_001_DIMER is "beta-clamp";
  species MG_250_MONOMER in default = 50; MG_250_MONOMER is "primase";
  species DNA_POLYMERASE_GAMMA_COMPLEX in default = 50; DNA_POLYMERASE_GAMMA_COMPLEX is "gamma complex";
  species leadDsDNA in default = 0; leadDsDNA is "leading dsDNA bp with a break";
  species lagDsDNA in default = 0; lagDsDNA is "lagDsDNA bp";
  species DNA_POLYMERASE_CORE_BETA_CLAMP_GAMMA_COMPLEX in default = 0; DNA_POLYMERASE_CORE_BETA_CLAMP_GAMMA_COMPLEX is "DNA polymerase III";
  species DnaA_ATP_complex in default = 1; DnaA_ATP_complex is "DnaA-ATP complex";
  species Complete_DNA in default = 0;

  // Parameters:
  Initiation_rate = 999999;
  Lag_ligation_rate = 0.04;
  Lead_ligation_rate = 0.04;
  Lead_polymerisation_rate = 0;
  okazaki_polymerisation_rate = 100;
  polymerase_complex_creation_rate = 1;
  ssb_binding_rate = 1;
  SSB_transformation_rate = 1;
  terminal_lag_ligation_rate = 0.04;
  termination_rate = 99999;
  unwinding_rate = 0.00173;
  Lead_ss_dna_block_rate = 100;

  // Reactions:
  unwinding: dsDNA => leadSsDNA + lagSsDNA; default*Rate_Law_1_substrate_1_modifier(unwinding_rate, dsDNA, MG_094_HEXAMER);  // modifiers: MG_094_HEXAMER
  terminal_leading_strand_ligation: 580076 leadDsDNA => Complete_DNA; default*Rate_Law_for_terminal_leading_strand_ligation();  // modifiers: MG_254_MONOMER
  leading_strand_polymerisation: leadSsDNA => leadDsDNA; default*Rate_Law_1_substrate(leadSsDNA, Lead_polymerisation_rate);  // modifiers: MG_250_MONOMER, DNA_POLYMERASE_CORE_BETA_CLAMP_GAMMA_COMPLEX
  Polymerase_complex_creation: 2 DNA_POLYMERASE_CORE + DNA_POLYMERASE_GAMMA_COMPLEX + MG_001_DIMER => DNA_POLYMERASE_CORE_BETA_CLAMP_GAMMA_COMPLEX; default*polymerase_complex_creation_rate*DNA_POLYMERASE_CORE^2*DNA_POLYMERASE_GAMMA_COMPLEX*MG_001_DIMER;

  // Events:
  start_polymerisation: at (leadSsDNA*default >= 100): Lead_polymerisation_rate = 100;

  // Unit definitions:
  unit volume = dimensionless;
  unit time = dimensionless;
  unit substance = item;
end
